// SBML level 2 version 4

model DNA_damage()

  // Compartments:
  compartment compartment = 1; compartment is "cytosol";
  compartment extracellular = 1;

  // Species:
  species DR5P in compartment = 1;
  species H in compartment = 1;
  species H2O in compartment = 1;
  species dRibose5P_dRibose5P in compartment = 1;
  species AD in compartment = 1;
  species acetamide in compartment = 1;
  species carbamoylmethyl6AD in compartment = 1;
  species DES in compartment = 1;
  species ES in compartment = 1;
  species e1AD in compartment = 1;
  species EMS in compartment = 1;
  species MS in compartment = 1;
  species ENU in compartment = 1;
  species NU in compartment = 1;
  species e3AD in compartment = 1;
  species e6AD in compartment = 1;
  species e7AD in compartment = 1;
  species CL in compartment = 1;
  species OH in compartment = 1;
  species chloroethylene_oxide in compartment = 1;
  species epsilon1N6AD in compartment = 1;
  species H_c in compartment = 1; H_c is "H[c]";
  species hydroxyl_radical_c in compartment = 1; hydroxyl_radical_c is "hydroxyl_radical[c]";
  species MMS in compartment = 1;
  species m1AD in compartment = 1;
  species MMSO4 in compartment = 1;
  species MSO4 in compartment = 1;
  species MNNG in compartment = 1;
  species NNG in compartment = 1;
  species MNU in compartment = 1;
  species m3AD in compartment = 1;
  species CH3 in compartment = 1;
  species m6AD in compartment = 1;
  species m7AD in compartment = 1;
  species NH3 in compartment = 1;
  species n2AD in compartment = 1;
  species CSN_c in compartment = 1; CSN_c is "CSN[c]";
  species CSN in compartment = 1;
  species e3CSN in compartment = 1;
  species NU_0 in compartment = 1;
  species OH_0 in compartment = 1;
  species epsilon3N4CSN in compartment = 1;
  species MS_0 in compartment = 1;
  species m3CSN in compartment = 1;
  species m4CSN in compartment = 1;
  species m5CSN in compartment = 1;
  species O2eCSN in compartment = 1;
  species O2mCSN in compartment = 1;
  species GN in compartment = 1;
  species e1GN in compartment = 1;
  species e3GN in compartment = 1;
  species e7GN in compartment = 1;
  species epsilon1N2GN in compartment = 1;
  species epsilonN23GN in compartment = 1;
  species m1GN in compartment = 1;
  species m3GN in compartment = 1;
  species m7GN in compartment = 1;
  species m8GN in compartment = 1;
  species O6eGN in compartment = 1;
  species O6mGN in compartment = 1;
  species oxoethyl7GN in compartment = 1;
  species GLC in compartment = 1;
  species glchm5CSN in compartment = 1;
  species hm5CSN in compartment = 1;
  species butylene_glycol in compartment = 1;
  species dhpURA in compartment = 1;
  species hm5URA in compartment = 1;
  species glchm5URA in compartment = 1;
  species GLU in compartment = 1;
  species gluTHY in compartment = 1;
  species PTRC in compartment = 1;
  species putTHY in compartment = 1;
  species hm3CSN_c in compartment = 1; hm3CSN_c is "hm3CSN[c]";
  species m3CSN_c in compartment = 1; m3CSN_c is "m3CSN[c]";
  species HYXN in compartment = 1;
  species URA in compartment = 1;
  species XAN in compartment = 1;
  species THY in compartment = 1;
  species DAMP in compartment = 1;
  species DCMP in compartment = 1;
  species DGMP in compartment = 1;
  species DTMP in compartment = 1;
  species DHTHY in compartment = 1;
  species hydrogen_radical in compartment = 1;
  species e3THY in compartment = 1;
  species m3THY in compartment = 1;
  species O2eTHY in compartment = 1;
  species O2mTHY in compartment = 1;
  species O4eTHY in compartment = 1;
  species O4mTHY in compartment = 1;
  species dApdAp in compartment = 1;
  species dCpdCp in compartment = 1;
  species dGpdGp in compartment = 1;
  species dTpdTp in compartment = 1;
  species AMP in compartment = 1;
  species NAD in compartment = 1;
  species NMN in compartment = 1;
  species DATP in compartment = 1;
  species PPI in compartment = 1;
  species DCTP in compartment = 1;
  species DGTP in compartment = 1;
  species DTTP in compartment = 1;
  species AHCYS in compartment = 1;
  species AMET in compartment = 1;
  species ADP in compartment = 1;
  species ATP in compartment = 1;
  species PI in compartment = 1;
  species FAPyAD in compartment = 1;
  species FAPydAMP in compartment = 1;
  species FAPyGN in compartment = 1;
  species FAPydGMP in compartment = 1;
  species oxo8AD in compartment = 1;
  species oxo8dAMP in compartment = 1;
  species oxo8GN in compartment = 1;
  species oxo8dGMP in compartment = 1;
  species ho5URA in compartment = 1;
  species ho5dUMP in compartment = 1;
  species DUMP in compartment = 1;
  species hydroxyl_radical in compartment = 1;
  species CSN64CSN in compartment = 1;
  species CSN64CSN_dewar in compartment = 1;
  species oxo2AD in compartment = 1;
  species cyclobutane_CSNCSN in compartment = 1;
  species CSN64THY in compartment = 1;
  species cyclobutane_CSNTHY in compartment = 1;
  species CSN_GLYC in compartment = 1;
  species ho5CSN in compartment = 1;
  species DA in compartment = 1;
  species cyclodA in compartment = 1;
  species DG in compartment = 1;
  species cyclodG in compartment = 1;
  species CO2 in compartment = 1;
  species DHURA in compartment = 1;
  species ho5hydantoin in compartment = 1;
  species c5URA in compartment = 1;
  species f5URA in compartment = 1;
  species H2O_0 in compartment = 1;
  species THY64CSN in compartment = 1;
  species THY64CSN_dewar in compartment = 1;
  species THY64THY in compartment = 1;
  species THY64THY_dewar in compartment = 1;
  species cyclobutane_THYCSN in compartment = 1;
  species cyclobutane_THYTHY in compartment = 1;
  species ho5ho6URA in compartment = 1;
  species ho5ho6THY in compartment = 1;
  species THY_GLYC in compartment = 1;
  species CSN64THY_dewar in compartment = 1;
  species hm3CSN in compartment = 1;
  species ho5CSN_0 in compartment = 1;
  species gamma_radiation_e in extracellular = 1; gamma_radiation_e is "gamma_radiation[e]";
  species UVB_radiation_e in extracellular = 1; UVB_radiation_e is "UVB_radiation[e]";

  // Parameters:
  k1 = 1.9254e-6;
  K105 = 1.1e-12;
  K104 = 2.2e-14;
  K106 = 2.2e-14;
  K107 = 2.2e-14;
  K108 = 2.4e-11;
  K109 = 6e-12;
  K110 = 3.6e-11;
  K111 = 6e-12;
  K112 = 1000;
  K113 = 1000;
  K114 = 1.46301e-8;
  K115 = 9.47236e-9;
  K116 = 6.19919e-8;
  K117 = 1.83e-8;
  K122 = 2.47477e-9;
  K136 = 2.75083e-8;
  K137 = 1.17997e-8;
  K139 = 5.89987e-8;
  K18 = 2.37339e-8;
  K34 = 6.56682e-8;
  K35 = 1000;
  K36 = 1000;
  K37 = 2.74252e-9;
  K38 = 1.19024e-8;
  K39 = 2.74252e-9;
  K40 = 1.19024e-8;
  K41 = 4.49514e-8;
  K46 = 9.83312e-8;
  K60 = 6.0831e-9;
  K62 = 1.71776e-7;
  K74 = 2.16207e-8;
  K93 = 1.5733e-7;

  // Reactions:
  r1: dRibose5P_dRibose5P + H2O => 2 DR5P + H; compartment*k1*dRibose5P_dRibose5P*H2O;
  r18: AD + gamma_radiation_e + H + hydroxyl_radical => FAPyAD; K18*AD*gamma_radiation_e*H*hydroxyl_radical;
  r34: AD + gamma_radiation_e + hydroxyl_radical => H + oxo8AD; K34*AD*gamma_radiation_e*hydroxyl_radical;
  r35: CSN64CSN + UVB_radiation_e => CSN64CSN_dewar; K35*CSN64CSN*UVB_radiation_e;
  r36: CSN64THY + UVB_radiation_e => CSN64THY_dewar; K36*CSN64THY*UVB_radiation_e;
  r37: 2 CSN + UVB_radiation_e => CSN64CSN; K37*CSN^2*UVB_radiation_e;
  r38: 2 CSN + UVB_radiation_e => cyclobutane_CSNCSN; K38*CSN^2*UVB_radiation_e;
  r39: CSN + THY + UVB_radiation_e => CSN64THY; K39*CSN*THY*UVB_radiation_e;
  r40: CSN + THY + UVB_radiation_e => cyclobutane_CSNTHY; K40*CSN*THY*UVB_radiation_e;
  r41: CSN + gamma_radiation_e + 2 hydroxyl_radical => CSN_GLYC; K41*CSN*gamma_radiation_e*hydroxyl_radical^2;
  r46: CSN + gamma_radiation_e + hydroxyl_radical => H + ho5CSN_0; K46*CSN*gamma_radiation_e*hydroxyl_radical;
  r60: DHURA + gamma_radiation_e + H2O => CO2 + 2 H + ho5hydantoin; K60*DHURA*gamma_radiation_e*H2O;
  r62: dRibose5P_dRibose5P + gamma_radiation_e + H2O => 2 DR5P + H; K62*dRibose5P_dRibose5P*gamma_radiation_e*H2O;
  r74: gamma_radiation_e + GN + H + hydroxyl_radical => FAPyGN; K74*gamma_radiation_e*GN*H*hydroxyl_radical;
  r93: gamma_radiation_e + GN + hydroxyl_radical => H + oxo8GN; K93*gamma_radiation_e*GN*hydroxyl_radical;
  r104: AD + H2O => HYXN + NH3; compartment*K104*AD*H2O;
  r105: CSN + H2O => NH3 + URA; compartment*K105*CSN*H2O;
  r106: GN + H2O => NH3 + XAN; compartment*K106*GN*H2O;
  r107: H2O + m5CSN => NH3 + THY; compartment*K107*H2O*m5CSN;
  r108: DAMP + H2O => AD + DR5P; compartment*K108*DAMP*H2O;
  r109: DCMP + H2O => CSN + DR5P; compartment*K109*DCMP*H2O;
  r110: DGMP + H2O => DR5P + GN; compartment*K110*DGMP*H2O;
  r111: DTMP + H2O => DR5P + THY; compartment*K111*DTMP*H2O;
  r112: THY64CSN + UVB_radiation_e => THY64CSN_dewar; K112*THY64CSN*UVB_radiation_e;
  r113: THY64THY + UVB_radiation_e => THY64THY_dewar; K113*THY64THY*UVB_radiation_e;
  r114: CSN_c + THY + UVB_radiation_e => cyclobutane_THYCSN; K114*CSN_c*THY*UVB_radiation_e;
  r115: CSN_c + THY + UVB_radiation_e => THY64CSN; K115*CSN_c*THY*UVB_radiation_e;
  r116: 2 THY + UVB_radiation_e => cyclobutane_THYTHY; K116*THY^2*UVB_radiation_e;
  r117: 2 THY + UVB_radiation_e => THY64THY; K117*THY^2*UVB_radiation_e;
  r122: gamma_radiation_e + hydroxyl_radical + THY => H + hm5URA; K122*gamma_radiation_e*hydroxyl_radical*THY;
  r136: gamma_radiation_e + 2 hydroxyl_radical + THY => THY_GLYC; K136*gamma_radiation_e*hydroxyl_radical^2*THY;
  r137: gamma_radiation_e + 2 hydroxyl_radical + URA => DHURA + 2 H; K137*gamma_radiation_e*hydroxyl_radical^2*URA;
  r139: gamma_radiation_e + hydroxyl_radical + URA => H + ho5URA; K139*gamma_radiation_e*hydroxyl_radical*URA;

  // Unit definitions:
  unit volume = 1e-3 litre;
  unit substance = 1e-3 mole;
end
